# oracle: LJ fluid, ave/correlate of the off-diagonal pressure tensor (pxy pxz pyz): type auto/upper, ave running, array + file
# oracle-files: pxy.corr
# oracle-compare: thermo=all atoms=all rel=1e-8 abs=1e-10
units           lj
atom_style      atomic
lattice         fcc 0.8442
region          box block 0 3 0 3 0 3
create_box      1 box
create_atoms    1 box
mass            1 1.0
velocity        all create 1.44 87287 loop all
pair_style      lj/cut 2.5
pair_coeff      * * 1.0 1.0 2.5
timestep        0.002
fix             1 all nve
compute         T all temp
compute         p all pressure T
fix             JJ all ave/correlate 2 10 40 c_p[4] c_p[5] c_p[6] type auto/upper ave running file pxy.corr
thermo_style    custom step temp pe c_p[4] c_p[5] c_p[6] f_JJ[1][3] f_JJ[2][3] f_JJ[5][4] f_JJ[10][8] f_JJ[10][2]
thermo_modify   format float %.15g
thermo          40
run             200
