# oracle: dihedral_style charmm with pair lj/charmm/coul/long and pppm (gewald and mesh pinned)
# oracle-inputs: w13dihcharmm_chains.data
units           real
atom_style      full
read_data       w13dihcharmm_chains.data
special_bonds   charmm
bond_style      harmonic
bond_coeff      1 300.0 1.5
angle_style     harmonic
angle_coeff     1 50.0 110.0
dihedral_style  charmm
dihedral_coeff  1 0.2 1 180 1.0
dihedral_coeff  2 1.8 1 0 1.0
dihedral_coeff  3 3.1 2 180 0.5
pair_style      lj/charmm/coul/long 8.0 10.0
pair_coeff      1 1 0.1 3.0 0.05 3.5
pair_coeff      2 2 0.15 3.2 0.1 3.1
pair_coeff      3 3 0.12 3.1 0.08 3.3
kspace_style    pppm 1.0e-5
kspace_modify   gewald 0.3 mesh 32 32 32 order 5
timestep        0.5
velocity        all create 300.0 4928459 units box
fix             1 all nve
thermo_style    custom step temp pe edihed evdwl ecoul press
thermo_modify   format float %.15g
thermo          10
run             50
