# oracle: compute snap with bikflag 1: one row per atom, then snad and snav rows
# oracle-compare: thermo=first atoms=all rel=1e-8 abs=1e-9
units           metal
atom_modify     map hash
lattice         bcc 2.0
region          box block 0 2 0 1 0 1
create_box      2 box
create_atoms    1 box
group           odd id 1:4:2
set             group odd type 2
mass            * 180.88
variable        dx atom 0.05*sin(1.3*x+0.7*y)
variable        dy atom 0.05*cos(0.9*y-1.1*z)
variable        dz atom 0.05*sin(1.7*z+0.5*x)
displace_atoms  all move v_dx v_dy v_dz units box
pair_style      zbl 4 4.8
pair_coeff      * * 73 73
compute snap all snap 1.0 0.99363 2 2.3 2.0 1.0 0.96 rmin0 0 switchflag 0 bikflag 1
thermo_style    custom step pe c_snap[1][1] c_snap[1][2] c_snap[1][3] c_snap[1][4] c_snap[1][5] c_snap[1][6] c_snap[1][7] c_snap[1][8] c_snap[1][9] c_snap[1][10] c_snap[1][11] c_snap[2][1] c_snap[2][2] c_snap[2][3] c_snap[2][4] c_snap[2][5] c_snap[2][6] c_snap[2][7] c_snap[2][8] c_snap[2][9] c_snap[2][10] c_snap[2][11] c_snap[3][1] c_snap[3][2] c_snap[3][3] c_snap[3][4] c_snap[3][5] c_snap[3][6] c_snap[3][7] c_snap[3][8] c_snap[3][9] c_snap[3][10] c_snap[3][11] c_snap[4][1] c_snap[4][2] c_snap[4][3] c_snap[4][4] c_snap[4][5] c_snap[4][6] c_snap[4][7] c_snap[4][8] c_snap[4][9] c_snap[4][10] c_s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
thermo_modify   format float %.15g
run             0
