# oracle: compute snap with bikflag 1 and quadraticflag 1: per-atom rows with linear and quadratic columns
# oracle-compare: thermo=first atoms=all rel=1e-8 abs=1e-9
units           metal
atom_modify     map hash
lattice         bcc 2.0
region          box block 0 2 0 1 0 1
create_box      2 box
create_atoms    1 box
group           odd id 1:4:2
set             group odd type 2
mass            * 180.88
variable        dx atom 0.05*sin(1.3*x+0.7*y)
variable        dy atom 0.05*cos(0.9*y-1.1*z)
variable        dz atom 0.05*sin(1.7*z+0.5*x)
displace_atoms  all move v_dx v_dy v_dz units box
pair_style      zbl 4 4.8
pair_coeff      * * 73 73
compute snap all snap 1.0 0.99363 2 2.3 2.0 1.0 0.96 rmin0 0 switchflag 0 bikflag 1 quadraticflag 1
thermo_style    custom step pe c_snap[1][1] c_snap[1][2] c_snap[1][3] c_snap[1][4] c_snap[1][5] c_snap[1][6] c_snap[1][7] c_snap[1][8] c_snap[1][9] c_snap[1][10] c_snap[1][11] c_snap[1][12] c_snap[1][13] c_snap[1][14] c_snap[1][15] c_snap[1][16] c_snap[1][17] c_snap[1][18] c_snap[1][19] c_snap[1][20] c_snap[1][21] c_snap[1][22] c_snap[1][23] c_snap[1][24] c_snap[1][25] c_snap[1][26] c_snap[1][27] c_snap[1][28] c_snap[1][29] c_snap[1][30] c_snap[1][31] c_snap[1][32] c_snap[1][33] c_snap[1][34] c_snap[1][35] c_snap[1][36] c_snap[1][37] c_snap[1][38] c_snap[1][39] c_snap[1][40] c_snap[1][41] c_sn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
thermo_modify   format float %.15g
run             0
