# oracle: pair_style lj/long/coul/long long off 2.5 with kspace ewald/disp and arithmetic mixing (dispersion only), NVE 50 steps
# oracle-inputs: w16disp_fcc2.data
units           lj
atom_style      charge
read_data       w16disp_fcc2.data
pair_style      lj/long/coul/long long off 2.5
pair_modify     table 0 table/disp 0 mix arithmetic
pair_coeff      1 1 1.0 1.0
pair_coeff      2 2 0.5 1.1
kspace_style    ewald/disp 1.0e-6
kspace_modify   gewald/disp 0.4
timestep        0.005
fix             1 all nve
thermo_style    custom step temp pe evdwl elong ecoul press pxx pyy pzz pxy pxz pyz
thermo_modify   format float %.15g
thermo          10
run             50
