# oracle: born/coul/long/cs and buck/coul/long/cs with a bonded core-shell pair at the same position (r = 0, as in the coreshell example data) and special_bonds weight 0: the r -> 0 limit of the excluded Coulomb term and no Born/Buckingham term; a short nve run lets the pair separate
# oracle-compare: thermo=all atoms=all rel=1e-6 abs=1e-9
# oracle-tolerance: the /cs styles' real-space erfc differs from the accurate erfc by about 1e-7 relative (coul_cs.ts header), as in the other /cs cases
units           metal
atom_style      full
boundary        p p p
region          box block 0 12 0 12 0 12
create_box      2 box bond/types 1 extra/bond/per/atom 1 extra/special/per/atom 2
create_atoms    1 single 5.0 5.0 5.0
create_atoms    2 single 5.0 5.0 5.0
create_atoms    1 single 8.0 8.0 8.0
create_atoms    2 single 9.6 8.0 8.0
mass            * 10.0
set             atom 1 charge 1.5
set             atom 2 charge -2.5
set             atom 3 charge 1.0
set             atom 4 charge 0.0
bond_style      harmonic
bond_coeff      1 60.0 0.0
create_bonds    single/bond 1 1 2
kspace_style    ewald 1e-6
kspace_modify   gewald 0.3 kmax/ewald 6 6 6
pair_style      born/coul/long/cs 5.0
pair_coeff      * * 0.0 1.0 0.0 0.0 0.0
pair_coeff      2 2 487.0 0.23768 0.0 1.05 0.5
pair_coeff      1 2 100.0 0.3 0.0 2.0 0.0
velocity        all set 0.0 0.0 0.0
group           shell id 2
velocity        shell set 0.5 0.2 -0.1 units box
fix             1 all nve
thermo_style    custom step pe evdwl ecoul elong ebond ke
thermo_modify   format float %.15g norm no
thermo          5
run             20
pair_style      buck/coul/long/cs 5.0
pair_coeff      * * 0.0 1.0 0.0
pair_coeff      1 2 100.0 0.3 2.0
set             atom 2 x 5.0 y 5.0 z 5.0
set             atom 1 x 5.0 y 5.0 z 5.0
run             10
