# oracle: special_bonds lj/coul factors on lj/cut/dipole/cut and lj/sf/dipole/sf (1-2, 1-3, 1-4 pairs of a bonded chain of charged point dipoles, atom_style hybrid bond sphere dipole); pe, forces and torque checksums
# oracle-compare: thermo=all atoms=all rel=1e-9 abs=1e-12
units           lj
atom_style      hybrid bond sphere dipole
region          box block -6 6 -6 6 -6 6
create_box      1 box bond/types 1 extra/bond/per/atom 2 extra/special/per/atom 6
create_atoms    1 single 0.0 0.0 0.0
create_atoms    1 single 1.1 0.2 0.0
create_atoms    1 single 2.0 0.9 0.3
create_atoms    1 single 2.6 1.9 0.1
create_atoms    1 single 3.7 2.2 -0.4
set             group all diameter 1.0
set             group all density 1.0
set             atom 1 dipole 0.5 0.2 0.1
set             atom 2 dipole -0.3 0.4 0.2
set             atom 3 dipole 0.1 -0.5 0.3
set             atom 4 dipole 0.2 0.2 -0.6
set             atom 5 dipole -0.4 0.1 0.1
set             atom 1 charge 0.3
set             atom 3 charge -0.2
set             atom 5 charge 0.4
bond_style      harmonic
bond_coeff      1 50.0 1.1
create_bonds    single/bond 1 1 2
create_bonds    single/bond 1 2 3
create_bonds    single/bond 1 3 4
create_bonds    single/bond 1 4 5
special_bonds   lj 0.0 0.3 0.6 coul 0.2 0.5 0.8
pair_style      lj/cut/dipole/cut 4.0
pair_coeff      * * 0.8 1.0
compute         p all property/atom tqx tqy tqz
variable        a1 atom c_p[1]*(1+0.1*id)
variable        a2 atom c_p[2]*(1+0.2*id)
variable        a3 atom c_p[3]*(1+0.3*id)
compute         r all reduce sum v_a1 v_a2 v_a3
thermo_style    custom step pe evdwl ecoul press c_r[1] c_r[2] c_r[3]
thermo_modify   format float %.15g norm no
run             0
pair_style      lj/sf/dipole/sf 4.0
pair_coeff      * * 0.8 1.0
run             0
