# oracle: pair gayberne driving fix nve/asphere then fix nvt/asphere (torques coupled into the angular momentum): 27 ellipsoids (two shapes, two epsilon triples) on a sparse lattice with per-atom orientations from atom-style variables; pe, ke, erotate/asphere, temp/asphere and quaternion/angular-momentum checksums
# oracle-compare: thermo=all atoms=all rel=1e-9 abs=1e-12
units           lj
atom_style      ellipsoid
lattice         sc 0.0233
region          box block 0 3 0 3 0 3
create_box      2 box
create_atoms    1 box
group           odd id 1:27:2
set             group odd type 2
set             type 1 shape 3.0 1.0 1.0
set             type 2 shape 2.0 1.2 1.0
set             group all density 1.0
variable        ax atom 0.3+sin(id)
variable        ay atom 0.5+cos(2*id)
variable        az atom 0.8+0.3*sin(3*id)
variable        th atom 10+17*id
set             group all quat v_ax v_ay v_az v_th
variable        lx atom 0.2*sin(5*id)
variable        ly atom 0.2*cos(7*id)
variable        lz atom 0.1*sin(11*id)
set             group all angmom v_lx v_ly v_lz
variable        vx atom 0.1*sin(13*id)
variable        vy atom 0.1*cos(17*id)
variable        vz atom 0.1*sin(19*id)
velocity        all set v_vx v_vy v_vz
pair_style      gayberne 1.0 3.0 1.0 4.0
pair_coeff      1 1 1.0 1.0 1.0 1.0 0.2 1.0 1.0 0.2
pair_coeff      2 2 1.2 1.1 1.0 0.5 0.8 1.0 0.5 0.8
pair_coeff      1 2 1.1 1.05 1.0 1.0 0.2 1.0 0.5 0.8
compute         rot all erotate/asphere
compute         ta all temp/asphere
compute         p all property/atom quatw quati quatj quatk angmomx angmomy angmomz
variable        a1 atom c_p[1]*(1+0.1*id)
variable        a2 atom c_p[2]*(1+0.2*id)
variable        a3 atom c_p[3]*(1+0.3*id)
variable        a4 atom c_p[4]*(1+0.4*id)
variable        a5 atom c_p[5]*(1+0.1*id)
variable        a6 atom c_p[6]*(1+0.2*id)
variable        a7 atom c_p[7]*(1+0.3*id)
compute         r all reduce sum v_a1 v_a2 v_a3 v_a4 v_a5 v_a6 v_a7
timestep        0.002
fix             1 all nve/asphere
thermo_style    custom step pe ke c_rot c_ta press c_r[1] c_r[2] c_r[3] c_r[4] c_r[5] c_r[6] c_r[7]
thermo_modify   format float %.15g norm no
thermo          25
run             200
unfix           1
fix             2 all nvt/asphere temp 0.8 0.8 0.2
run             200
