# oracle: born/coul/wolf/cs core-shell dimers — some core-shell pairs start at r = 0 (weight-0 1-2 special bond), the rest are separated; short nve run
# oracle-inputs: w21borncs_cs.data
# oracle-compare: thermo=all atoms=all rel=1e-5 abs=1e-9
# oracle-tolerance: for a weight-0 core/shell pair at r = 0 the native Coulomb term is c.e - bare with no removal of the cancellation, so its value is not the analytic r -> 0 limit. Measured with native LAMMPS (black box): the native r = 0 special-pair value shifts sign with alpha and rc (delta/|pref| from -8.5e-7 to +1.2e-6, floating-point noise), so the engine returns the analytic limit (as for born/coul/long/cs in coul_cs.ts). Measured with native LAMMPS (black box): the worst column deviation of this case is 9.5e-8 relative; the two r = 0 core/shell dimers carry the small charge 0.1 so that this native noise stays a minor part of ecoul.
units           real
atom_style      full
bond_style      harmonic
read_data       w21borncs_cs.data
pair_style      born/coul/wolf/cs 0.3 8.0
pair_coeff      * * 0.0 1.0 0.0 0.0 0.0
pair_coeff      1 1 6.08 0.317 2.340 24.18 11.51
pair_coeff      2 2 2.50 0.300 1.600 5.00 2.00
pair_coeff      1 2 0.0 1.0 0.0 0.0 0.0
bond_coeff      1 20.0 0.5
special_bonds   lj/coul 0.0 1.0 1.0
velocity        all set 0.0 0.0 0.0
group           shell id 2:12:2
velocity        shell set 0.4 0.1 -0.2 units box
timestep        0.05
fix             1 all nve
thermo_style    custom step temp pe evdwl ecoul ebond etotal press pxx pyy pzz pxy pxz pyz
thermo_modify   format float %.15g
thermo          5
run             20
