# oracle: pair_style eam with the LAMMPS potential file Cu_u3.eam (third_party/lammps/potentials), fcc copper with a 0.05 A sinusoidal displacement, velocities from atom-style variables, 100 steps of nve
# oracle-potentials: Cu_u3.eam
# oracle-compare: thermo=all atoms=all rel=1e-9 abs=1e-12
units           metal
atom_style      atomic
lattice         fcc 3.615
region          box block 0 4 0 4 0 4
create_box      1 box
create_atoms    1 box
variable        dx atom 0.05*sin(1.3*x+0.7*y)
variable        dy atom 0.05*cos(0.9*y-0.4*z)
variable        dz atom 0.05*sin(1.1*z+0.5*x)
displace_atoms  all move v_dx v_dy v_dz units box
variable        vx atom 0.01*sin(id)
variable        vy atom 0.01*cos(2*id)
variable        vz atom 0.01*sin(3*id)
pair_style      eam
pair_coeff      1 1 Cu_u3.eam
velocity        all set v_vx v_vy v_vz
timestep        0.002
fix             1 all nve
thermo_style    custom step pe ke press pxx pyz
thermo_modify   format float %.15g norm no
thermo          20
run             100
