# oracle: pair_style vashishta/table with SiO.1990.vashishta (Si O), displaced lattice, velocities from atom-style variables, 50 steps of nve
# oracle-potentials: SiO.1990.vashishta
# oracle-compare: thermo=all atoms=all rel=1e-9 abs=1e-12
units           metal
atom_style      atomic
lattice         diamond 5.43
region          box block 0 3 0 3 0 3
create_box      2 box
create_atoms    1 box
group         t2 id 2:216:2
set             group t2 type 2
mass            1 28.0855
mass            2 15.999
variable        dx atom 0.05*sin(1.3*x+0.7*y)
variable        dy atom 0.05*cos(0.9*y-0.4*z)
variable        dz atom 0.05*sin(1.1*z+0.5*x)
displace_atoms  all move v_dx v_dy v_dz units box
variable        vx atom 0.01*sin(id)
variable        vy atom 0.01*cos(2*id)
variable        vz atom 0.01*sin(3*id)
pair_style vashishta/table 10000 0.2
pair_coeff * * SiO.1990.vashishta Si O
velocity        all set v_vx v_vy v_vz
timestep        0.001
fix             1 all nve
thermo_style    custom step pe ke press pxx pyz
thermo_modify   format float %.15g norm no
thermo          10
run             50
