# oracle: pair_style tersoff — silicon, Si(C) parameters
# oracle-inputs: w2tsw_Si.tersoff
units           metal
atom_style      atomic
lattice         diamond 5.431
region          box block 0 2 0 2 0 2
create_box      1 box
create_atoms    1 box
mass            * 28.0855
variable        dx atom 0.06*sin(0.9*x+0.4*y)
variable        dy atom 0.06*cos(0.7*y-0.5*z)
variable        dz atom 0.06*sin(1.1*z+0.3*x)
displace_atoms  all move v_dx v_dy v_dz units box
variable        vx atom 3.0*sin(0.5*x+0.2*z)
variable        vy atom 3.0*cos(0.4*y+0.6*x)
variable        vz atom 3.0*sin(0.3*z-0.5*y)
velocity        all set v_vx v_vy v_vz units box
velocity        all zero linear
pair_style      tersoff
pair_coeff      * * w2tsw_Si.tersoff Si
timestep        0.001
fix             1 all nve
thermo_style    custom step temp pe etotal press pxx pyy pzz pxy pxz pyz
thermo_modify   format float %.15g
thermo          10
run             50
