# oracle: Widom atom insertion, lj/cut, seed 12345, N=2 M=3
units lj
atom_style atomic
boundary p p p
region box block 0 4 0 4 0 4
create_box 2 box
create_atoms 1 single 1.0 1.0 1.0 units box
create_atoms 1 single 3.0 2.0 2.5 units box
mass 1 1.0
mass 2 1.0
pair_style lj/cut 2.5
pair_coeff 1 1 1.0 1.0
pair_coeff 1 2 1.0 1.0
pair_coeff 2 2 1.0 1.0
fix w all widom 2 3 2 12345 1.0
thermo_style custom step f_w[1] f_w[2] f_w[3]
thermo_modify format float %.15g
thermo 1
run 10
