# oracle: fix wall/region on a rotating (dynamic) plane region (side in): the face normal is rotated into the lab frame each step; a few atoms inside the rotating half-space, harmonic wall
# oracle-compare: thermo=all atoms=all rel=1e-8 abs=1e-10
units           lj
atom_style      atomic
boundary        f f f
region          box block -5 5 -5 5 -5 5 units box
create_box      1 box
create_atoms    1 single 2.0 0.5 1.0
create_atoms    1 single 1.5 -0.5 0.8
create_atoms    1 single 2.5 1.0 1.5
mass            1 1.0
pair_style      lj/cut 2.5
pair_coeff      1 1 1.0 1.0 2.5
timestep        0.002
fix             1 all nve
variable        theta equal 0.01*step
region          pl plane 0.0 0.0 0.0 1.0 0.0 0.0 side in rotate v_theta 0.0 0.0 0.0 0.0 0.0 1.0
fix             2 all wall/region pl harmonic 1.0 0.0 2.5
fix_modify      2 energy yes
thermo_style    custom step ke pe etotal f_2 f_2[1] f_2[2] f_2[3]
thermo_modify   format float %.15g
thermo          5
run             40
