# oracle: pair_style meam Si-C dimer (non-periodic) with the real library.meam + SiC.meam; the parameter file sets rho0(2) = 2.25, overwriting the library rozero = 2.25 of C (docs.lammps.org/pair_meam.html "rho0(I) = relative density for element I (overwrites value read from meamf file)")
# oracle-potentials: library.meam SiC.meam
# oracle-compare: thermo=all atoms=all rel=1e-8 abs=1e-9
units           metal
atom_style      atomic
boundary        f f f
region          box block -10 10 -10 10 -10 10
create_box      2 box
create_atoms    1 single 0.0 0.0 0.0
create_atoms    2 single 2.2 0.3 0.1
mass            1 28.086
mass            2 12.011
pair_style      meam
pair_coeff      * * library.meam Si C SiC.meam Si C
thermo          1
thermo_style    custom step pe
thermo_modify   format float %.15g
run             0
