# oracle: fix rigid custom i_bodies (examples/rigid/in.rigid.property): bodies from a fix property/atom integer vector read by read_data fix 0 NULL Clumps, 9 clumps of 9 atoms, 600 steps
# oracle-inputs: w35rigid_iname.data
# oracle-compare: thermo=all atoms=all rel=1e-7 abs=1e-9 skip=press
# oracle: press is skipped: the fix rigid virial differs from native by about 1e-6 relative here (dynamics, pe and ke agree to 1e-12; the same gap shows in the pressure-tensor components of rigid_molecule and w6rigid_custom), an open rigid issue independent of the bodystyle
units           lj
atom_style      atomic
atom_modify  map array
pair_style      lj/cut 2.5
fix 0 all property/atom i_bodies
read_data       w35rigid_iname.data fix 0 NULL Clumps
velocity        all create 100.0 4928459
group           clump1 id <> 1 9
group           clump2 id <> 10 18
group           clump3 id <> 19 27
group           clump4 id <> 28 36
group           clump5 id <> 37 45
group           clump6 id <> 46 54
group           clump7 id <> 55 63
group           clump8 id <> 64 72
group           clump9 id <> 73 81
fix 1 all rigid custom i_bodies
neigh_modify    exclude group clump1 clump1
neigh_modify    exclude group clump2 clump2
neigh_modify    exclude group clump3 clump3
neigh_modify    exclude group clump4 clump4
neigh_modify    exclude group clump5 clump5
neigh_modify    exclude group clump6 clump6
neigh_modify    exclude group clump7 clump7
neigh_modify    exclude group clump8 clump8
neigh_modify    exclude group clump9 clump9
timestep        0.0001
thermo          100
thermo_style    custom step temp pe ke etotal press
thermo_modify   format float %.15g
run             600
