# oracle: run_style respa 3 levels — bonds level 1, angles and dihedrals and impropers level 2, lj/cut level 3, fix nve
# oracle-inputs: mol_chains.data
# oracle-compare: thermo=all atoms=all rel=1e-8
units           lj
atom_style      molecular
bond_style      harmonic
angle_style     harmonic
dihedral_style  harmonic
improper_style  harmonic
pair_style      lj/cut 2.5
read_data       mol_chains.data
pair_coeff      * * 0.5 0.9
pair_coeff      1 3 0.8 1.0
bond_coeff      1 120.0 1.05
bond_coeff      2 90.0 1.1
angle_coeff     1 40.0 109.5
angle_coeff     2 25.0 120.0
dihedral_coeff  1 1.5 -1 3
improper_coeff  1 12.0 20.0
special_bonds   lj 0.0 0.5 0.8
timestep        0.002
run_style       respa 3 2 3 bond 1 angle 2 pair 3
fix             1 all nve
thermo_style    custom step temp pe ebond eangle edihed eimp evdwl etotal press
thermo_modify   format float %.15g
thermo          10
run             60
