# oracle: pair_style lj/relres with pair_modify shift yes (Gamma_c offset), hybrid and ordinary site types, explicit cross term
units           lj
atom_style      atomic
lattice         fcc 0.8442
region          box block 0 3 0 3 0 3
create_box      2 box
create_atoms    1 box
group           odd id 1:108:2
set             group odd type 2
mass            1 1.0
mass            2 1.5
variable        dx atom 0.04*sin(1.3*x+0.7*y)
variable        dy atom 0.04*cos(0.9*y-1.1*z)
variable        dz atom 0.04*sin(1.7*z+0.5*x)
displace_atoms  all move v_dx v_dy v_dz units box
variable        vx atom 0.8*sin(0.9*x+0.4*z)
variable        vy atom 0.8*cos(0.6*y+0.8*x)
variable        vz atom 0.8*sin(0.7*z-0.3*y)
velocity        all set v_vx v_vy v_vz units box
velocity        all zero linear
pair_style      lj/relres 1.4 1.7 2.0 2.5
pair_coeff      1 1 1.0 1.0 0.5 1.2
pair_coeff      2 2 0.0 1.0 0.7 1.1
pair_coeff      1 2 0.9 1.0 0.3 1.05
pair_modify     shift yes
timestep        0.002
fix             1 all nve
thermo_style    custom step temp pe press pxx pyy pzz pxy pxz pyz
thermo_modify   format float %.15g
thermo          10
run             50
