# oracle: read_dump with box no and add yes (IDs renumbered after the largest existing ID) into a one-cell box
# oracle-inputs: w9rerun_readdump.dump
# oracle-compare: thermo=all atoms=all rel=1e-8 abs=1e-10
units           lj
atom_style      atomic
lattice         fcc 0.8442
region          box block 0 1 0 1 0 1
create_box      1 box
create_atoms    1 box
mass            1 1.0
pair_style      lj/cut 2.5
pair_coeff      1 1 1.0 1.0 2.5
neighbor        0.3 bin
read_dump       w9rerun_readdump.dump 10 x y z vx vy vz ix iy iz box no add yes
thermo          1
run             0
