# oracle: rerun selection: first/last/every on two dump files, then skip on the second file
# oracle-inputs: w9rerun_basic.dump w9rerun_every.dump
# oracle-compare: thermo=all atoms=all rel=1e-8 abs=1e-10
units           lj
atom_style      atomic
lattice         fcc 0.8442
region          box block 0 2 0 2 0 2
create_box      1 box
create_atoms    1 box
mass            1 1.0
pair_style      lj/cut 2.5
pair_coeff      1 1 1.0 1.0 2.5
neighbor        0.3 bin
neigh_modify    every 1 delay 0 check yes
thermo_style    custom step pe press
thermo_modify   format float %.15g
thermo          1
rerun           w9rerun_basic.dump w9rerun_every.dump first 5 last 30 every 10 dump x y z
rerun           w9rerun_every.dump skip 2 dump x y z
