# oracle: read_dump with purge yes, replace no, add keep: every atom is replaced by the dump snapshot, IDs kept
# oracle-inputs: w9rerun_readdump.dump
# oracle-compare: thermo=all atoms=all rel=1e-8 abs=1e-10
units           lj
atom_style      atomic
lattice         fcc 0.8442
region          box block 0 1 0 1 0 1
create_box      1 box
create_atoms    1 box
mass            1 1.0
pair_style      lj/cut 2.5
pair_coeff      1 1 1.0 1.0 2.5
neighbor        0.3 bin
neigh_modify    every 1 delay 0 check yes
thermo_style    custom step pe press
thermo_modify   format float %.15g
read_dump       w9rerun_readdump.dump 10 x y z vx vy vz ix iy iz purge yes replace no add keep
thermo          1
run             0
